// SBML level 3 version 2

model main()
  // model units - time: second, extent: mmole

  // Compartments:
  compartment Cell = 1 litre;

  // Species:
  substanceOnly species E in Cell = 1*Cell; E is "benzaldehyde-lyase";  // substance in mmole; isVersionOf uniprot:P51853
  substanceOnly species A in Cell = 4*Cell; A is "dimethoxy-benzaldehyde";  // substance in mmole
  substanceOnly species B in Cell = 0; B is "benzaldehyde";  // substance in mmole; CHEBI:17169

  // Reactions:
  Michaelis_Menten_Kinetic: A => B; kcat*E*A/(KMA + A);  // modifiers: E
    KMA = 100 mmole; kcat = 100 s_1;

  // Unit definitions:
  unit mmole = 1e-3 mole;
  unit s_1 = 1 / second;
  unit K = kelvin;
end
